OpenVSP model (file version 4), 11 components.
Geometry view with OpenVSP parameter names; values to 6 digits, angles in degrees, lengths in the model's unit.
Overall bounding box: X_Min=-20 X_Len=180.896 Y_Min=-77.5 Y_Len=155 Z_Min=-15.2173 Z_Len=66.0869

Fuselage "FuselageGeom"
  location (X Y Z) -20 0 0, rotation 0 0 0
  bounding box size 180.896 15 27.7173
  Design: Length=180
  cross sections:
    n  XLocPercent  YLocPercent  ZLocPercent  shape
    0  0            0            -0.0430057   point
    1  0.220302     0            0            rounded rectangle RoundRectXSec_Radius=0 RoundedRect_Height=25 RoundedRect_Width=15
    2  0.45399      0            0            as above
    3  0.687677     0            0            as above
    4  0.980978     0            0            as above
    5  1            0            0            point

Wing "VTail"
  location (X Y Z) 126.739 0 10.8696, rotation 90 0 0
  bounding box size 33.6523 3.00096 40
  totals: TotalSpan=40 TotalProjectedSpan=40 TotalChord=22.5 TotalArea=900
  root: chord 30, twist 0, NACA 4-series Camber=0 CamberLoc=0.2 ThickChord=0.1
  sections:
    n  Span  Root_Chord  Tip_Chord  Area  Sweep  Sweep_Location  Dihedral  Twist  Twist_Location  tip airfoil
    1  40    30          15         900   25     0               0         0      0.25            as above

Blank "WingSet"
  location (X Y Z) 140 0 7.5, rotation 0 0 0

Wing "MainWing", child of "WingSet"
  location (X Y Z) 130 7.5 7.5, rotation 0 0 0; relative location -10 7.5 0, rotation 0 0 0
  symmetric about XZ
  bounding box size 25 155 2.5008
  totals: TotalSpan=140 TotalProjectedSpan=140 TotalChord=25 TotalArea=3500
  root: chord 25, twist 0, NACA 4-series Camber=0 CamberLoc=0.2 ThickChord=0.1
  sections:
    n  Span  Root_Chord  Tip_Chord  Area  Sweep  Sweep_Location  Dihedral  Twist  Twist_Location  tip airfoil
    1  70    25          25         1750  0      0               0         0      0.25            as above

Propeller "MainProp1", child of "WingSet"
  location (X Y Z) 130 25 7.5, rotation 120 0 0; relative location -10 25 0, rotation 120 0 0
  symmetric about XZ
  bounding box size 1.372 76.0433 23.3622
  Design: Diameter=26 NumBlade=3 Beta34=20 UseBeta34Flag=1 Feather=0 Rotate=0 ReverseFlag=0 FoldAngle=0 AF=152.25
  cross sections:
    n  RadiusFrac  shape
    0  0.0782609   circle Circle_Diameter=1.04
    1  0.45        NACA 4-series Camber=0.05 CamberLoc=0.4 Chord=2.44809 ThickChord=0.12
    2  0.7         NACA 4-series Camber=0.05 CamberLoc=0.4 Chord=2.6 ThickChord=0.05
    3  1           NACA 4-series Camber=0.01 CamberLoc=0.4 Chord=1.69 ThickChord=0.03
  Chord along r/R (cubic Bezier): 0.0782609: 0.08, 0.252174: 0.15, 0.426087: 0.2, 0.6: 0.2, 0.716667: 0.2, 0.833333: 0.2, 0.95: 0.2, 0.966667: 0.2, 0.983333: 0.2, 1: 0.13
  Twist along r/R (PCHIP): 0.0782609: 46.75, 0.75: 20, 1: 13

Propeller "MainProp2", child of "WingSet"
  location (X Y Z) 130 55 7.5, rotation -60 0 0; relative location -10 55 0, rotation -60 0 0
  symmetric about XZ
  bounding box size 1.372 124.787 23.3622
  Design: Diameter=26 NumBlade=3 Beta34=20 UseBeta34Flag=1 Feather=0 Rotate=0 ReverseFlag=0 FoldAngle=0 AF=152.25
  cross sections:
    n  RadiusFrac  shape
    0  0.0782609   circle Circle_Diameter=1.04
    1  0.45        NACA 4-series Camber=0.05 CamberLoc=0.4 Chord=2.44809 ThickChord=0.12
    2  0.7         NACA 4-series Camber=0.05 CamberLoc=0.4 Chord=2.6 ThickChord=0.05
    3  1           NACA 4-series Camber=0.01 CamberLoc=0.4 Chord=1.69 ThickChord=0.03
  blade curves as in "MainProp1"

Fuselage "LandingGear", child of "WingSet"
  location (X Y Z) 140 8 -11.5, rotation 0 0 90; relative location 0 8 -19, rotation 0 0 90
  symmetric about XZ
  bounding box size 6 20.3847 6
  Design: Length=1.8
  cross sections:
    n  XLocPercent  YLocPercent  ZLocPercent  shape
    0  0            0            0            point
    1  0.0199669    0            0            ellipse Ellipse_Height=6 Ellipse_Width=6
    2  0.918478     0            0            as above
    3  1            0            0            point

Blank "TailSet"
  location (X Y Z) 28 0 7.5, rotation 0 0 0

Wing "HTail", child of "TailSet"
  location (X Y Z) 20 7.5 7.5, rotation 0 0 0; relative location -8 7.5 0, rotation 0 0 0
  symmetric about XZ
  bounding box size 20 95 2.00064
  totals: TotalSpan=80 TotalProjectedSpan=80 TotalChord=20 TotalArea=1600
  root: chord 20, twist 0, NACA 4-series Camber=0 CamberLoc=0.2 ThickChord=0.1
  sections:
    n  Span  Root_Chord  Tip_Chord  Area  Sweep  Sweep_Location  Dihedral  Twist  Twist_Location  tip airfoil
    1  40    20          20         800   0      0               0         0      0.25            as above

Propeller "TailProp", child of "TailSet"
  location (X Y Z) 20 30 7.5, rotation 30 0 0; relative location -8 30 0, rotation 30 0 0
  symmetric about XZ
  bounding box size 1.31923 82.4637 19.6299
  Design: Diameter=25 NumBlade=3 Beta34=20 UseBeta34Flag=1 Feather=0 Rotate=0 ReverseFlag=0 FoldAngle=0 AF=152.25
  cross sections:
    n  RadiusFrac  shape
    0  0.0782609   circle Circle_Diameter=1
    1  0.45        NACA 4-series Camber=0.05 CamberLoc=0.4 Chord=2.35393 ThickChord=0.12
    2  0.7         NACA 4-series Camber=0.05 CamberLoc=0.4 Chord=2.5 ThickChord=0.05
    3  1           NACA 4-series Camber=0.01 CamberLoc=0.4 Chord=1.625 ThickChord=0.03
  blade curves as in "MainProp1"

Fuselage "LandingGear", child of "TailSet"
  location (X Y Z) 28 8 -11.5, rotation 0 0 90; relative location 0 8 -19, rotation 0 0 90
  symmetric about XZ
  bounding box size 6 20.3847 6
  Design: Length=1.8
  cross sections:
    n  XLocPercent  YLocPercent  ZLocPercent  shape
    0  0            0            0            point
    1  0.0199669    0            0            ellipse Ellipse_Height=6 Ellipse_Width=6
    2  0.918478     0            0            as above
    3  1            0            0            point
